#INITIALIZATION
clear
units real
dimension 3
boundary p p p
atom_style full

# FF PARAMETERS
special_bonds lj/coul 0 0 1
pair_style lj/cut/coul/long 12.0
bond_style harmonic
angle_style harmonic
kspace_style ewald 1.0e-5

#BOX SETTINGS
read_data m3_with_ff.data

#RUN Energy minimization
minimize 1.0e-8 1.0e-8 10000 10000

write_data c3s_min.data
